;; 1. Based on: ../../Simulations/ModeFRX/run4-1scmplus.dir/finalModel
;; 2. Description:
;;    MATRIX=S
;; 3. Label:
;;    DAT-1, TYPE=1
;------------------------------------------------------------------------------
$PROBLEM    run 1
$INPUT      NO ID STUDYID TAD TIME AMT RATE ODV DV EVID BLQ DOSE FOOD
            FORM TYPE WT HT AGE SEX RACE ETHNIC GENO SMOK AST ALT BILI
            BMI CRCL NCI NCIL RACEL RACEL1 RACEL2 RACEL3 GENO1 GENO2
            GENO3 GENO4
$DATA      ../../../../Simulations/ModelFRX/DAT-1-MI-PMX-1.csv
            IGNORE=@ IGNORE(TYPE.EQN.2) IGNORE(BLQ.EQN.1)
$SUBROUTINE ADVAN2 TRANS2
$PK
;;; FRELNCIL-DEFINITION START
IF(NCIL.EQ.0.0000E+00) FRELNCIL = 1  ; Most common
IF(NCIL.EQ.1.0000E+00) FRELNCIL = ( 1 + THETA(16))
;;; FRELNCIL-DEFINITION END


;;; FRELFORM-DEFINITION START
IF(FORM.EQ.1.0000E+00) FRELFORM = 1  ; Most common
IF(FORM.EQ.0.0000E+00) FRELFORM = ( 1 + THETA(15))
;;; FRELFORM-DEFINITION END

;;; FREL-RELATION START
FRELCOV=FRELFORM*FRELNCIL
;;; FREL-RELATION END


;;; CLFOOD-DEFINITION START
IF(FOOD.EQ.1.0000E+00) CLFOOD = 1  ; Most common
IF(FOOD.EQ.0.0000E+00) CLFOOD = ( 1 + THETA(14))
;;; CLFOOD-DEFINITION END

;;; CL-RELATION START
CLCOV=CLFOOD
;;; CL-RELATION END


TVFREL  = THETA(1)
IF(GENO.EQ.1) TVFREL = TVFREL*(1+THETA(11))
IF(GENO.EQ.3) TVFREL = TVFREL*(1+THETA(12))
IF(GENO.EQ.4) TVFREL = TVFREL*(1+THETA(13))

TVFREL = FRELCOV*TVFREL

TVCL    = THETA(4) * (WT/75)**THETA(2)

IF(GENO.EQ.1) TVCL = TVCL*(1+THETA(8))
IF(GENO.EQ.3) TVCL = TVCL*(1+THETA(9))
IF(GENO.EQ.4) TVCL = TVCL*(1+THETA(10))

TVCL = CLCOV*TVCL

TVV     = THETA(5) * (WT/75)**THETA(3)
TVMAT   = THETA(6)
TVD1    = THETA(7)

FREL  = TVFREL  * EXP(ETA(2))
CL    = TVCL    * EXP(ETA(3))
V     = TVV     * EXP(ETA(4))
MAT   = TVMAT   * EXP(ETA(5))
D1    = MAT*(1-TVD1)

F1    = FREL
KA    = 1 / (MAT-D1)
S2    = V

$ERROR
CP    = A(2)*1000 / V
IPRED = LOG(CP + 0.00001)
Y     = IPRED + EPS(1) * EXP(ETA(1))

$THETA  1 FIX ; 1. TVFREL
$THETA  0.75 FIX ; 2. WT coef on TVCL
$THETA  1 FIX ; 3. WT coef on TVV
$THETA  (0,13.9846989530245) ; 4. TVCL
$THETA  (0,229.655159864582) ; 5. TVV
$THETA  (0,6.33751938291694) ; 6. TVMAT
$THETA  (0,0.608343587523759,1) ; 7 TVD1
$THETA  (-1,0.652312887132055) ; GENO=1 on CL
$THETA  (-1,-0.196750544143201) ; GENO=3 on CL
$THETA  (-1,-0.54287612104927) ; GENO=4 on CL
$THETA  (-1,-0.385009058248877) ; GENO=1 on CL_
$THETA  (-1,0.567874362076386) ; GENO=3 on CL_
$THETA  (-1,2.69027344737854) ; GENO=4 on CL_
$THETA  (-1.00,0.252889826089044,3.00) ; CLFOOD1
$THETA  (-1.00,-0.147218651828029,3.00) ; FRELFORM1
$THETA  (-1.00,0.166129274024775,3.00) ; FRELNCIL1
$OMEGA  0.0270182939389217  ; 1. IIV on RUV
$OMEGA  0.215604332735352  ; 2. IIV on FREL
$OMEGA  0.0631915396973392  ; 3. IIV on CL
$OMEGA  0.14475991943142  ; 4. IIV on V
$OMEGA  0.134642083100813  ; 5. IIV on MAT
$SIGMA  0.0457075744210449  ;     1. RUV
$ESTIMATION METHOD=1 INTERACTION NOABORT ETASTYPE=1 PRINT=1 MAXEVALS=0

;------------------------------------------------------------------------------
$PROBLEM    run 1
$INPUT      NO ID STUDYID TAD TIME AMT RATE ODV DV EVID BLQ DOSE FOOD
            FORM TYPE WT HT AGE SEX RACE ETHNIC GENO SMOK AST ALT BILI
            BMI CRCL NCI NCIL RACEL RACEL1 RACEL2 RACEL3 GENO1 GENO2
            GENO3 GENO4
$DATA      ../../../../Simulations/ModelFRX/DAT-1-MI-PMX-1.csv
            IGNORE=@ IGNORE(TYPE.EQN.2) IGNORE(BLQ.EQN.1) REWIND
$THETA  1 FIX ; 1. TVFREL
$THETA  0.75 FIX ; 2. WT coef on TVCL
$THETA  1 FIX ; 3. WT coef on TVV
$THETA  (0,13.1086401989915) ; 4. TVCL
$THETA  (0,206.620965481679) ; 5. TVV
$THETA  (0,6.41074783294212) ; 6. TVMAT
$THETA  (0,0.617136532315607,1) ; 7 TVD1
$THETA  (-1,0.968613693842692) ; GENO=1 on CL
$THETA  (-1,-0.323461737434953) ; GENO=3 on CL
$THETA  (-1,-0.540948195549591) ; GENO=4 on CL
$THETA  (-1,-0.478756972584322) ; GENO=1 on CL_
$THETA  (-1,0.224320934952299) ; GENO=3 on CL_
$THETA  (-1,2.67815809765868) ; GENO=4 on CL_
$THETA  (-1.00,0.249419946725463,3.00) ; CLFOOD1
$THETA  (-1.00,-0.144428338654666,3.00) ; FRELFORM1
$THETA  (-1.00,0.183917675902535,3.00) ; FRELNCIL1
$OMEGA  0.0212851996030094  ; 1. IIV on RUV
$OMEGA  0.254463381513794  ; 2. IIV on FREL
$OMEGA  0.0566522754602207  ; 3. IIV on CL
$OMEGA  0.126917836000924  ; 4. IIV on V
$OMEGA  0.135707960847413  ; 5. IIV on MAT
$SIGMA  0.0466442440717412  ;     1. RUV
$ESTIMATION METHOD=1 INTERACTION NOABORT ETASTYPE=1 PRINT=1 MAXEVALS=0

;------------------------------------------------------------------------------
$PROBLEM    run 1
$INPUT      NO ID STUDYID TAD TIME AMT RATE ODV DV EVID BLQ DOSE FOOD
            FORM TYPE WT HT AGE SEX RACE ETHNIC GENO SMOK AST ALT BILI
            BMI CRCL NCI NCIL RACEL RACEL1 RACEL2 RACEL3 GENO1 GENO2
            GENO3 GENO4
$DATA      ../../../../Simulations/ModelFRX/DAT-1-MI-PMX-1.csv
            IGNORE=@ IGNORE(TYPE.EQN.2) IGNORE(BLQ.EQN.1) REWIND
$THETA  1 FIX ; 1. TVFREL
$THETA  0.75 FIX ; 2. WT coef on TVCL
$THETA  1 FIX ; 3. WT coef on TVV
$THETA  (0,13.1189425000941) ; 4. TVCL
$THETA  (0,215.754088416939) ; 5. TVV
$THETA  (0,6.44209141823977) ; 6. TVMAT
$THETA  (0,0.593555693440334,1) ; 7 TVD1
$THETA  (-1,1.06162490072474) ; GENO=1 on CL
$THETA  (-1,-0.227744597374215) ; GENO=3 on CL
$THETA  (-1,-0.552647693473843) ; GENO=4 on CL
$THETA  (-1,-0.251990482660905) ; GENO=1 on CL_
$THETA  (-1,0.246992502657314) ; GENO=3 on CL_
$THETA  (-1,2.70939171738991) ; GENO=4 on CL_
$THETA  (-1.00,0.253508996862667,3.00) ; CLFOOD1
$THETA  (-1.00,-0.126255198273029,3.00) ; FRELFORM1
$THETA  (-1.00,0.112465062263499,3.00) ; FRELNCIL1
$OMEGA  0.0210790407862306  ; 1. IIV on RUV
$OMEGA  0.253466408155677  ; 2. IIV on FREL
$OMEGA  0.0405779439412035  ; 3. IIV on CL
$OMEGA  0.177267704817691  ; 4. IIV on V
$OMEGA  0.127715749478616  ; 5. IIV on MAT
$SIGMA  0.0460310256574611  ;     1. RUV
$ESTIMATION METHOD=1 INTERACTION NOABORT ETASTYPE=1 PRINT=1 MAXEVALS=0

;------------------------------------------------------------------------------
$PROBLEM    run 1
$INPUT      NO ID STUDYID TAD TIME AMT RATE ODV DV EVID BLQ DOSE FOOD
            FORM TYPE WT HT AGE SEX RACE ETHNIC GENO SMOK AST ALT BILI
            BMI CRCL NCI NCIL RACEL RACEL1 RACEL2 RACEL3 GENO1 GENO2
            GENO3 GENO4
$DATA      ../../../../Simulations/ModelFRX/DAT-1-MI-PMX-1.csv
            IGNORE=@ IGNORE(TYPE.EQN.2) IGNORE(BLQ.EQN.1) REWIND
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$THETA  1 FIX ; 1. TVFREL
$THETA  0.75 FIX ; 2. WT coef on TVCL
$THETA  1 FIX ; 3. WT coef on TVV
$THETA  (0,13.9731898142772) ; 4. TVCL
$THETA  (0,224.385326552717) ; 5. TVV
$THETA  (0,6.56548640682154) ; 6. TVMAT
$THETA  (0,0.615364461180507,1) ; 7 TVD1
$THETA  (-1,0.360130235112653) ; GENO=1 on CL
$THETA  (-1,-0.287412231395168) ; GENO=3 on CL
$THETA  (-1,-0.543770581785279) ; GENO=4 on CL
$THETA  (-1,-0.541550344430398) ; GENO=1 on CL_
$THETA  (-1,0.311039535760386) ; GENO=3 on CL_
$THETA  (-1,2.66264404098013) ; GENO=4 on CL_
$THETA  (-1.00,0.250613993700947,3.00) ; CLFOOD1
$THETA  (-1.00,-0.146278810589549,3.00) ; FRELFORM1
$THETA  (-1.00,0.365979168536241,3.00) ; FRELNCIL1
$OMEGA  0.0229023467149433  ; 1. IIV on RUV
$OMEGA  0.247560693479136  ; 2. IIV on FREL
$OMEGA  0.0498249643406843  ; 3. IIV on CL
$OMEGA  0.137573283286122  ; 4. IIV on V
$OMEGA  0.12991573541764  ; 5. IIV on MAT
$SIGMA  0.0438904988485902  ;     1. RUV
$ESTIMATION METHOD=1 INTERACTION NOABORT ETASTYPE=1 PRINT=1 MAXEVALS=0

;------------------------------------------------------------------------------
$PROBLEM    run 1
$INPUT      NO ID STUDYID TAD TIME AMT RATE ODV DV EVID BLQ DOSE FOOD
            FORM TYPE WT HT AGE SEX RACE ETHNIC GENO SMOK AST ALT BILI
            BMI CRCL NCI NCIL RACEL RACEL1 RACEL2 RACEL3 GENO1 GENO2
            GENO3 GENO4
$DATA      ../../../../Simulations/ModelFRX/DAT-1-MI-PMX-1.csv
            IGNORE=@ IGNORE(TYPE.EQN.2) IGNORE(BLQ.EQN.1) REWIND
$THETA  1 FIX ; 1. TVFREL
$THETA  0.75 FIX ; 2. WT coef on TVCL
$THETA  1 FIX ; 3. WT coef on TVV
$THETA  (0,13.3353144740595) ; 4. TVCL
$THETA  (0,212.410621047024) ; 5. TVV
$THETA  (0,6.61988607980306) ; 6. TVMAT
$THETA  (0,0.624274927752953,1) ; 7 TVD1
$THETA  (-1,0.814845053912358) ; GENO=1 on CL
$THETA  (-1,-0.198283605599723) ; GENO=3 on CL
$THETA  (-1,-0.380693985062954) ; GENO=4 on CL
$THETA  (-1,-0.362054686181904) ; GENO=1 on CL_
$THETA  (-1,0.298510955067607) ; GENO=3 on CL_
$THETA  (-1,3.91198658496363) ; GENO=4 on CL_
$THETA  (-1.00,0.237341514834234,3.00) ; CLFOOD1
$THETA  (-1.00,-0.166062666403791,3.00) ; FRELFORM1
$THETA  (-1.00,0.29564234885318,3.00) ; FRELNCIL1
$OMEGA  0.0252667176245305  ; 1. IIV on RUV
$OMEGA  0.260813916699791  ; 2. IIV on FREL
$OMEGA  0.0530131908004191  ; 3. IIV on CL
$OMEGA  0.121964025646939  ; 4. IIV on V
$OMEGA  0.163604136911332  ; 5. IIV on MAT
$SIGMA  0.0458618024913704  ;     1. RUV
$ESTIMATION METHOD=1 INTERACTION NOABORT ETASTYPE=1 PRINT=1 MAXEVALS=0
