Fri Jun  4 12:49:05 CEST 2021
;; 1. Based on: 6
;; 2. Description:
;;    Final scm model
;; 3. Label:
;;    SimVal base model
;------------------------------------------------------------------------------
$PROBLEM    run 1
$INPUT      NO ID STUDYID TAD TIME DAY AMT RATE ODV DV EVID BLQ DOSE
            FOOD FORM TYPE WT HT AGE SEX RACE ETHNIC GENO SMOK AST ALT
            BILI BMI CRCL NCI NCIL RACEL RACEL1 RACEL2 RACEL3 GENO1
            GENO2 GENO3 GENO4
$DATA      DAT-1-MI-PMX-2.csv IGNORE=@ IGNORE(TYPE.EQN.2)
            IGNORE(BLQ.EQN.1) IGNORE=(ID.EQN.895)
$SUBROUTINE ADVAN2 TRANS2
$PK
;;; FRELSEX-DEFINITION START
IF(SEX.EQ.1.0000E+00) FRELSEX = 1  ; Most common
IF(SEX.EQ.2.0000E+00) FRELSEX = ( 1 + THETA(14))
;;; FRELSEX-DEFINITION END

;;; FRELGENO4-DEFINITION START
IF(GENO4.EQ.0.0000E+00) FRELGENO4 = 1  ; Most common
IF(GENO4.EQ.1.0000E+00) FRELGENO4 = ( 1 + THETA(13))
;;; FRELGENO4-DEFINITION END

;;; FRELFORM-DEFINITION START
IF(FORM.EQ.1.0000E+00) FRELFORM = 1  ; Most common
IF(FORM.EQ.0.0000E+00) FRELFORM = ( 1 + THETA(12))
;;; FRELFORM-DEFINITION END

;;; FREL-RELATION START
FRELCOV=FRELFORM*FRELGENO4*FRELSEX
;;; FREL-RELATION END

;;; CLFOOD-DEFINITION START
IF(FOOD.EQ.1.0000E+00) CLFOOD = 1  ; Most common
IF(FOOD.EQ.0.0000E+00) CLFOOD = ( 1 + THETA(11))
;;; CLFOOD-DEFINITION END

;;; CL-RELATION START
CLCOV=CLFOOD
;;; CL-RELATION END

TVFREL  = THETA(1)

TVFREL = FRELCOV*TVFREL

CLWT    =  (WT/75)**THETA(2)
CLGENO1 = 1
CLGENO2 = 1
CLGENO3 = 1
CLGENO4 = 1
IF(GENO1.EQ.1) CLGENO1 = (1+THETA(8))
IF(GENO3.EQ.1) CLGENO3 = (1+THETA(9))
IF(GENO4.EQ.1) CLGENO4 = (1+THETA(10))

CLCOV1 = CLWT*CLGENO1*CLGENO2*CLGENO3*CLGENO4

VWT   = (WT/75)**THETA(3)
VCOV1  = VWT

TVCL    = THETA(4) * CLCOV1

TVCL = CLCOV*TVCL
TVV     = THETA(5) * VCOV1
TVMAT   = THETA(6)
TVD1    = THETA(7)

FREL  = TVFREL  * EXP(ETA(2))
CL    = TVCL    * EXP(ETA(3))
V     = TVV     * EXP(ETA(4))
MAT   = TVMAT   * EXP(ETA(5))
D1    = MAT*(1-TVD1)

F1    = FREL
KA    = 1 / (MAT-D1)
S2    = V

$ERROR
CP    = A(2)*1000 / V
IPRED = LOG(CP + 0.00001)
Y     = IPRED + EPS(1) * EXP(ETA(1))

$THETA  1 FIX ; 1. TVFREL
$THETA  0.75 FIX ; 2. WT coef on TVCL
$THETA  1 FIX ; 3. WT coef on TVV
$THETA  (0,11.9) ; 4. TVCL
$THETA  (0,191) ; 5. TVV
$THETA  (0,6.47) ; 6. TVMAT
$THETA  (0,0.616,1) ; 7 TVD1
$THETA  (-1,1.24) ; GENO2=1 on CL
$THETA  (-1,-0.335) ; GENO3=1 on CL
$THETA  (-1,-0.515) ; GENO4=1 on CL
$THETA  (-1.00,0.252,3.00) ; CLFOOD1
$THETA  (-1.00,-0.145,3.00) ; FRELFORM1
$THETA  (-1.00,2.64,3.00) ; FRELGENO41
$THETA  (-1.00,-0.139,3.00) ; FRELSEX1
$OMEGA  0.0257  ; 1. IIV on RUV
$OMEGA  0.256  ; 2. IIV on FREL
$OMEGA  0.0476  ; 3. IIV on CL
$OMEGA  0.159  ; 4. IIV on V
$OMEGA  0.144  ; 5. IIV on MAT
$SIGMA  0.0444  ;     1. RUV
$ESTIMATION METHOD=1 INTER ETASTYPE=1 MAXEVAL=9999 PRINT=1 NOABORT
$COVARIANCE PRINT=E MATRIX=S UNCONDITIONAL
$TABLE      NO ID STUDYID TAD TIME DAY AMT RATE ODV DV EVID BLQ DOSE
            FOOD FORM TYPE WT HT AGE SEX RACE ETHNIC GENO SMOK AST ALT
            BILI BMI CRCL NCI NCIL RACEL RACEL1 RACEL2 RACEL3 GENO1
            GENO2 GENO3 GENO4 CPRED CIPREDI CWRES CIWRES ETAS(1:LAST)
            FREL CL V MAT TVD1 NOPRINT ONEHEADER FILE=xptab7

NM-TRAN MESSAGES
 WARNINGS AND ERRORS (IF ANY) FOR PROBLEM    1
 (WARNING  2) NM-TRAN INFERS THAT THE DATA ARE POPULATION.

1NONLINEAR MIXED EFFECTS MODEL PROGRAM (NONMEM) VERSION 7.4.4
 ORIGINALLY DEVELOPED BY STUART BEAL, LEWIS SHEINER, AND ALISON BOECKMANN
 CURRENT DEVELOPERS ARE ROBERT BAUER, ICON DEVELOPMENT SOLUTIONS,
 AND ALISON BOECKMANN. IMPLEMENTATION, EFFICIENCY, AND STANDARDIZATION
 PERFORMED BY NOUS INFOSYSTEMS.
 PROBLEM NO.:         1
 run 1
 TOT. NO. OF OBS RECS:     6284
 TOT. NO. OF INDIVIDUALS:      754
 ONE COMPARTMENT MODEL WITH FIRST-ORDER ABSORPTION (ADVAN2)
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 #TBLN:      1
 #METH: First Order Conditional Estimation with Interaction
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
 #TERM:
0MINIMIZATION TERMINATED
 DUE TO ROUNDING ERRORS (ERROR=134)
 NO. OF FUNCTION EVALUATIONS USED:      776
 NO. OF SIG. DIGITS IN FINAL EST.:  2.8

 ETABAR IS THE ARITHMETIC MEAN OF THE ETA-ESTIMATES,
 AND THE P-VALUE IS GIVEN FOR THE NULL HYPOTHESIS THAT THE TRUE MEAN IS 0.

 ETABAR:        -3.9082E-02  2.0290E-02  6.6479E-03 -3.4755E-02  2.3101E-03
 SE:             3.6104E-03  1.6101E-02  4.0944E-03  9.6619E-03  1.0312E-02
 N:                     749         749         749         749         749

 P VAL.:         2.6894E-27  2.0760E-01  1.0445E-01  3.2188E-04  8.2275E-01

 ETASHRINKSD(%)  3.8358E+01  1.2784E+01  4.8612E+01  3.3578E+01  2.5449E+01
 ETASHRINKVR(%)  6.2003E+01  2.3934E+01  7.3593E+01  5.5881E+01  4.4422E+01
 EBVSHRINKSD(%)  4.4699E+01  1.1069E+01  4.5111E+01  3.1567E+01  2.0780E+01
 EBVSHRINKVR(%)  6.9419E+01  2.0912E+01  6.9872E+01  5.3169E+01  3.7242E+01
 EPSSHRINKSD(%)  9.5125E+00
 EPSSHRINKVR(%)  1.8120E+01


 TOTAL DATA POINTS NORMALLY DISTRIBUTED (N):         6412
 N*LOG(2PI) CONSTANT TO OBJECTIVE FUNCTION:    11784.467749816722
 OBJECTIVE FUNCTION VALUE WITHOUT CONSTANT:   -7299.6992434565745
 OBJECTIVE FUNCTION VALUE WITH CONSTANT:       4484.7685063601475
 REPORTED OBJECTIVE FUNCTION DOES NOT CONTAIN CONSTANT

 TOTAL EFFECTIVE ETAS (NIND*NETA):                          3750


 #TERE:
 Elapsed estimation  time in seconds:   138.42
 Elapsed covariance  time in seconds:     8.39
 Elapsed postprocess time in seconds:     3.05

 ********************               FIRST ORDER CONDITIONAL ESTIMATION WITH INTERACTION              ********************
 #OBJT:**************                       MINIMUM VALUE OF OBJECTIVE FUNCTION                      ********************
 #OBJV:********************************************    -7299.699       **************************************************

 ********************               FIRST ORDER CONDITIONAL ESTIMATION WITH INTERACTION              ********************
 ********************                             FINAL PARAMETER ESTIMATE                           ********************

 THETA - VECTOR OF FIXED EFFECTS PARAMETERS   *********
         TH 1      TH 2      TH 3      TH 4      TH 5      TH 6      TH 7      TH 8      TH 9      TH10      TH11      TH12
          TH13      TH14
         1.00E+00  7.50E-01  1.00E+00  1.19E+01  1.91E+02  6.47E+00  6.16E-01  1.24E+00 -3.35E-01 -5.15E-01  2.52E-01 -1.45E-01
          2.64E+00 -1.39E-01

 OMEGA - COV MATRIX FOR RANDOM EFFECTS - ETAS  ********
         ETA1      ETA2      ETA3      ETA4      ETA5
 ETA1
+        2.57E-02
 ETA2
+        0.00E+00  2.56E-01
 ETA3
+        0.00E+00  0.00E+00  4.76E-02
 ETA4
+        0.00E+00  0.00E+00  0.00E+00  1.59E-01
 ETA5
+        0.00E+00  0.00E+00  0.00E+00  0.00E+00  1.44E-01

 SIGMA - COV MATRIX FOR RANDOM EFFECTS - EPSILONS  ****
         EPS1
 EPS1
+        4.44E-02

 OMEGA - CORR MATRIX FOR RANDOM EFFECTS - ETAS  *******
         ETA1      ETA2      ETA3      ETA4      ETA5
 ETA1
+        1.60E-01
 ETA2
+        0.00E+00  5.06E-01
 ETA3
+        0.00E+00  0.00E+00  2.18E-01
 ETA4
+        0.00E+00  0.00E+00  0.00E+00  3.98E-01
 ETA5
+        0.00E+00  0.00E+00  0.00E+00  0.00E+00  3.79E-01

 SIGMA - CORR MATRIX FOR RANDOM EFFECTS - EPSILONS  ***
         EPS1
 EPS1
+        2.11E-01

 ********************               FIRST ORDER CONDITIONAL ESTIMATION WITH INTERACTION              ********************
 ********************                            STANDARD ERROR OF ESTIMATE                          ********************

 THETA - VECTOR OF FIXED EFFECTS PARAMETERS   *********
         TH 1      TH 2      TH 3      TH 4      TH 5      TH 6      TH 7      TH 8      TH 9      TH10      TH11      TH12
          TH13      TH14
        ......... ......... .........  3.65E-01  8.20E+00  1.51E-01  7.41E-03  1.57E-01  3.80E-02  5.39E-02  9.56E-03  1.00E-02
          5.40E-01  3.70E-02

 OMEGA - COV MATRIX FOR RANDOM EFFECTS - ETAS  ********
         ETA1      ETA2      ETA3      ETA4      ETA5
 ETA1
+        3.12E-03
 ETA2
+       .........  1.99E-02
 ETA3
+       ......... .........  1.35E-02
 ETA4
+       ......... ......... .........  1.69E-02
 ETA5
+       ......... ......... ......... .........  1.23E-02

 SIGMA - COV MATRIX FOR RANDOM EFFECTS - EPSILONS  ****
         EPS1
 EPS1
+        1.02E-03

 OMEGA - CORR MATRIX FOR RANDOM EFFECTS - ETAS  *******
         ETA1      ETA2      ETA3      ETA4      ETA5
 ETA1
+        9.74E-03
 ETA2
+       .........  1.97E-02
 ETA3
+       ......... .........  3.09E-02
 ETA4
+       ......... ......... .........  2.12E-02
 ETA5
+       ......... ......... ......... .........  1.63E-02

 SIGMA - CORR MATRIX FOR RANDOM EFFECTS - EPSILONS  ***
         EPS1
 EPS1
+        2.42E-03
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
 ********************               FIRST ORDER CONDITIONAL ESTIMATION WITH INTERACTION              ********************
 ********************                      EIGENVALUES OF COR MATRIX OF ESTIMATE                     ********************

             1         2         3         4         5         6         7         8         9        10        11        12
             13        14        15        16        17
         1.34E-01  2.50E-01  3.27E-01  3.70E-01  5.24E-01  5.45E-01  6.54E-01  7.38E-01  8.87E-01  1.02E+00  1.13E+00  1.14E+00
          1.43E+00  1.54E+00  1.73E+00  2.11E+00  2.48E+00
 Elapsed finaloutput time in seconds:     3.51
 #CPUT: Total CPU Time in Seconds,      558.729
