Fri Jun  5 10:17:09 CEST 2020
;; 1. Based on: ../../Simulations/ModeFRX/run4-1scmplus.dir/finalModel
;; 2. Description:
;;    MATRIX=S
;; 3. Label:
;;    DAT-1, TYPE=1
;------------------------------------------------------------------------------
$PROBLEM    run 1
$INPUT      NO ID STUDYID TAD TIME DAY AMT RATE ODV DV EVID BLQ DOSE
            FOOD FORM TYPE WT HT AGE SEX RACE ETHNIC GENO SMOK AST ALT
            BILI BMI CRCL NCI NCIL RACEL RACEL1 RACEL2 RACEL3 GENO1
            GENO2 GENO3 GENO4
$DATA      DAT-1-MI-PMX-2.csv IGNORE=@ IGNORE(TYPE.EQN.2)
            IGNORE(BLQ.EQN.1)
$SUBROUTINE ADVAN2 TRANS2
$PK
;;; FRELNCIL-DEFINITION START
IF(NCIL.EQ.0.0000E+00) FRELNCIL = 1  ; Most common
IF(NCIL.EQ.1.0000E+00) FRELNCIL = ( 1 + THETA(16))
;;; FRELNCIL-DEFINITION END

;;; FRELFORM-DEFINITION START
IF(FORM.EQ.1.0000E+00) FRELFORM = 1  ; Most common
IF(FORM.EQ.0.0000E+00) FRELFORM = ( 1 + THETA(15))
;;; FRELFORM-DEFINITION END

;;; FREL-RELATION START
FRELCOV=FRELFORM*FRELNCIL
;;; FREL-RELATION END

;;; CLFOOD-DEFINITION START
IF(FOOD.EQ.1.0000E+00) CLFOOD = 1  ; Most common
IF(FOOD.EQ.0.0000E+00) CLFOOD = ( 1 + THETA(14))
;;; CLFOOD-DEFINITION END

;;; CL-RELATION START
CLCOV=CLFOOD
;;; CL-RELATION END

TVFREL  = THETA(1)
IF(GENO.EQ.1) TVFREL = TVFREL*(1+THETA(11))
IF(GENO.EQ.3) TVFREL = TVFREL*(1+THETA(12))
IF(GENO.EQ.4) TVFREL = TVFREL*(1+THETA(13))

TVFREL = FRELCOV*TVFREL

TVCL    = THETA(4) * (WT/75)**THETA(2)

IF(GENO.EQ.1) TVCL = TVCL*(1+THETA(8))
IF(GENO.EQ.3) TVCL = TVCL*(1+THETA(9))
IF(GENO.EQ.4) TVCL = TVCL*(1+THETA(10))

TVCL = CLCOV*TVCL

TVV     = THETA(5) * (WT/75)**THETA(3)
TVMAT   = THETA(6)
TVD1    = THETA(7)

FREL  = TVFREL  * EXP(ETA(2))
CL    = TVCL    * EXP(ETA(3))
V     = TVV     * EXP(ETA(4))
MAT   = TVMAT   * EXP(ETA(5))
D1    = MAT*(1-TVD1)

F1    = FREL
KA    = 1 / (MAT-D1)
S2    = V

$ERROR
CP    = A(2)*1000 / V
IPRED = LOG(CP + 0.00001)
Y     = IPRED + EPS(1) * EXP(ETA(1))

$THETA  1 FIX ; 1. TVFREL
$THETA  0.75 FIX ; 2. WT coef on TVCL
$THETA  1 FIX ; 3. WT coef on TVV
$THETA  (0,13.3) ; 4. TVCL
$THETA  (0,216) ; 5. TVV
$THETA  (0,6.43) ; 6. TVMAT
$THETA  (0,0.618,1) ; 7 TVD1
$THETA  (-1,0.737) ; GENO=1 on CL
$THETA  (-1,-0.235) ; GENO=3 on CL
$THETA  (-1,-0.51) ; GENO=4 on CL
$THETA  (-1,-0.424) ; GENO=1 on CL_
$THETA  (-1,0.309) ; GENO=3 on CL_
$THETA  (-1,2.8) ; GENO=4 on CL_
$THETA  (-1.00,0.253,3.00) ; CLFOOD1
$THETA  (-1.00,-0.144,3.00) ; FRELFORM1
$THETA  (-1.00,0.255,3.00) ; FRELNCIL1
$OMEGA  0.0259  ; 1. IIV on RUV
$OMEGA  0.251  ; 2. IIV on FREL
$OMEGA  0.0475  ; 3. IIV on CL
$OMEGA  0.154  ; 4. IIV on V
$OMEGA  0.144  ; 5. IIV on MAT
$SIGMA  0.0444  ;     1. RUV
$ESTIMATION METHOD=1 INTER ETASTYPE=1 MAXEVAL=9999 PRINT=1 NOABORT
$COVARIANCE PRINT=E MATRIX=S UNCONDITIONAL
$TABLE      NO ID STUDYID TAD TIME AMT RATE ODV DV EVID BLQ DOSE FOOD
            FORM TYPE WT HT AGE SEX RACE ETHNIC GENO SMOK AST ALT BILI
            BMI CRCL NCI NCIL RACEL RACEL2 RACEL3 GENO2 GENO3 GENO4
            CPRED CIPREDI CWRES CIWRES ETAS(1:LAST) NOPRINT ONEHEADER
            FILE=xptab1

NM-TRAN MESSAGES
 WARNINGS AND ERRORS (IF ANY) FOR PROBLEM    1
 (WARNING  2) NM-TRAN INFERS THAT THE DATA ARE POPULATION.
Note: The following floating-point exceptions are signalling: IEEE_INVALID_FLAG IEEE_DIVIDE_BY_ZERO

1NONLINEAR MIXED EFFECTS MODEL PROGRAM (NONMEM) VERSION 7.3.0
 ORIGINALLY DEVELOPED BY STUART BEAL, LEWIS SHEINER, AND ALISON BOECKMANN
 CURRENT DEVELOPERS ARE ROBERT BAUER, ICON DEVELOPMENT SOLUTIONS,
 AND ALISON BOECKMANN. IMPLEMENTATION, EFFICIENCY, AND STANDARDIZATION
 PERFORMED BY NOUS INFOSYSTEMS.
 PROBLEM NO.:         1
 run 1
 TOT. NO. OF OBS RECS:     6285
 TOT. NO. OF INDIVIDUALS:    755
 ONE COMPARTMENT MODEL WITH FIRST-ORDER ABSORPTION (ADVAN2)
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 #TBLN:      1
 #METH: First Order Conditional Estimation with Interaction
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
 #TERM:
0MINIMIZATION SUCCESSFUL
 NO. OF FUNCTION EVALUATIONS USED:      705
 NO. OF SIG. DIGITS IN FINAL EST.:  3.2

 ETABAR IS THE ARITHMETIC MEAN OF THE ETA-ESTIMATES,
 AND THE P-VALUE IS GIVEN FOR THE NULL HYPOTHESIS THAT THE TRUE MEAN IS 0.

 ETABAR:        -3.9418E-02  2.0627E-02  6.8531E-03 -3.4959E-02  3.0007E-03
 SE:             3.6381E-03  1.5983E-02  4.1433E-03  9.5547E-03  1.0369E-02
 N:                     746         746         746         746         746

 P VAL.:         2.4106E-27  1.9685E-01  9.8124E-02  2.5344E-04  7.7227E-01

 ETAshrink(%):   3.8169E+01  1.2729E+01  4.8059E+01  3.3528E+01  2.5343E+01
 EBVshrink(%):   4.4986E+01  1.1320E+01  4.5101E+01  3.2014E+01  2.0942E+01
 EPSshrink(%):   9.5006E+00

 #TERE:
 Elapsed estimation time in seconds:   216.95
 Elapsed covariance time in seconds:    30.62

 ********************               FIRST ORDER CONDITIONAL ESTIMATION WITH INTERACTION              ********************
 #OBJT:**************                       MINIMUM VALUE OF OBJECTIVE FUNCTION                      ********************
 #OBJV:********************************************    -7317.241       **************************************************

 ********************               FIRST ORDER CONDITIONAL ESTIMATION WITH INTERACTION              ********************
 ********************                             FINAL PARAMETER ESTIMATE                           ********************

 THETA - VECTOR OF FIXED EFFECTS PARAMETERS   *********
         TH 1      TH 2      TH 3      TH 4      TH 5      TH 6      TH 7      TH 8      TH 9      TH10      TH11      TH12
          TH13      TH14      TH15      TH16
         1.00E+00  7.50E-01  1.00E+00  1.33E+01  2.16E+02  6.43E+00  6.18E-01  7.37E-01 -2.35E-01 -5.10E-01 -4.24E-01  3.09E-01
          2.80E+00  2.53E-01 -1.44E-01  2.55E-01

 OMEGA - COV MATRIX FOR RANDOM EFFECTS - ETAS  ********
            ETA1      ETA2      ETA3      ETA4      ETA5
 ETA1
+        2.59E-02
 ETA2
+        0.00E+00  2.51E-01
 ETA3
+        0.00E+00  0.00E+00  4.75E-02
 ETA4
+        0.00E+00  0.00E+00  0.00E+00  1.54E-01
 ETA5
+        0.00E+00  0.00E+00  0.00E+00  0.00E+00  1.44E-01

 SIGMA - COV MATRIX FOR RANDOM EFFECTS - EPSILONS  ****
            EPS1
 EPS1
+        4.44E-02

 OMEGA - CORR MATRIX FOR RANDOM EFFECTS - ETAS  *******
            ETA1      ETA2      ETA3      ETA4      ETA5
 ETA1
+        1.61E-01
 ETA2
+        0.00E+00  5.01E-01
 ETA3
+        0.00E+00  0.00E+00  2.18E-01
 ETA4
+        0.00E+00  0.00E+00  0.00E+00  3.93E-01
 ETA5
+        0.00E+00  0.00E+00  0.00E+00  0.00E+00  3.80E-01

 SIGMA - CORR MATRIX FOR RANDOM EFFECTS - EPSILONS  ***
            EPS1
 EPS1
+        2.11E-01

 ********************               FIRST ORDER CONDITIONAL ESTIMATION WITH INTERACTION              ********************
 ********************                            STANDARD ERROR OF ESTIMATE                          ********************

 THETA - VECTOR OF FIXED EFFECTS PARAMETERS   *********
         TH 1      TH 2      TH 3      TH 4      TH 5      TH 6      TH 7      TH 8      TH 9      TH10      TH11      TH12
          TH13      TH14      TH15      TH16
        ......... ......... .........  3.37E-01  8.92E+00  1.52E-01  7.42E-03  1.87E-01  5.13E-02  5.37E-02  9.92E-02  1.21E-01
          5.48E-01  9.58E-03  1.00E-02  7.98E-02

 OMEGA - COV MATRIX FOR RANDOM EFFECTS - ETAS  ********
            ETA1      ETA2      ETA3      ETA4      ETA5
 ETA1
+        3.14E-03
 ETA2
+       .........  2.09E-02
 ETA3
+       ......... .........  1.39E-02
 ETA4
+       ......... ......... .........  1.70E-02
 ETA5
+       ......... ......... ......... .........  1.24E-02

 SIGMA - COV MATRIX FOR RANDOM EFFECTS - EPSILONS  ****
            EPS1
 EPS1
+        1.02E-03

 OMEGA - CORR MATRIX FOR RANDOM EFFECTS - ETAS  *******
            ETA1      ETA2      ETA3      ETA4      ETA5
 ETA1
+        9.77E-03
 ETA2
+       .........  2.09E-02
 ETA3
+       ......... .........  3.19E-02
 ETA4
+       ......... ......... .........  2.16E-02
 ETA5
+       ......... ......... ......... .........  1.64E-02

 SIGMA - CORR MATRIX FOR RANDOM EFFECTS - EPSILONS  ***
            EPS1
 EPS1
+        2.43E-03
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
 ********************               FIRST ORDER CONDITIONAL ESTIMATION WITH INTERACTION              ********************
 ********************                      EIGENVALUES OF COR MATRIX OF ESTIMATE                     ********************

             1         2         3         4         5         6         7         8         9        10        11        12
             13        14        15        16        17        18        19
         1.54E-01  2.35E-01  2.54E-01  3.00E-01  3.84E-01  5.03E-01  5.41E-01  5.90E-01  7.47E-01  8.91E-01  9.64E-01  1.03E+00
          1.24E+00  1.41E+00  1.50E+00  1.61E+00  1.85E+00  2.29E+00  2.51E+00
 #CPUT: Total CPU Time in Seconds,      488.218
