Mon Sep  7 20:40:56 CEST 2020
;; 1. Based on: 60
;; 2. Description:
;;    Implementing final frem60.dir model
;; 3. Label:
;;    DAT-1, TYPE=1
$PROBLEM    run 1
$INPUT      NO ID STUDYID TAD TIME DAY AMT RATE ODV DV EVID BLQ DOSE
            FOOD FORM TYPE WT HT AGE SEX RACE ETHNIC GENO SMOK AST ALT
            BILI BMI CRCL NCI NCIL RACEL RACEL1 RACEL2 RACEL3 GENO1
            GENO2 GENO3 GENO4 FREMTYPE
$DATA      frem_dataset.dta IGNORE=@
$SUBROUTINE ADVAN2 TRANS2
$PK
;;; FRELGENO-DEFINITION START
IF(GENO.EQ.2.0000E+00) FRELGENO = 1  ; Most common
IF(GENO.EQ.3.0000E+00) FRELGENO = ( 1 + THETA(14))
IF(GENO.EQ.4.0000E+00) FRELGENO = ( 1 + THETA(15))
IF(GENO.EQ.1.0000E+00) FRELGENO = ( 1 + THETA(16))
;;; FRELGENO-DEFINITION END

;;; FRELFORM-DEFINITION START
IF(FORM.EQ.1.0000E+00) FRELFORM = 1  ; Most common
IF(FORM.EQ.0.0000E+00) FRELFORM = ( 1 + THETA(13))
;;; FRELFORM-DEFINITION END

;;; FREL-RELATION START
FRELCOVTIME = FRELFORM
FRELCOV = FRELGENO
;;; FREL-RELATION END

;;; CLFOOD-DEFINITION START
IF(FOOD.EQ.1.0000E+00) CLFOOD = 1  ; Most common
IF(FOOD.EQ.0.0000E+00) CLFOOD = ( 1 + THETA(12))
;;; CLFOOD-DEFINITION END

CLWT = (WT/75)**THETA(2)

IF(GENO.EQ.2) CLGENO = 1
IF(GENO.EQ.1) CLGENO = (1+THETA(9))
IF(GENO.EQ.3) CLGENO = (1+THETA(10))
IF(GENO.EQ.4) CLGENO = (1+THETA(11))

;;; CL-RELATION START
CLCOVTIME = CLFOOD
CLCOV=CLWT*CLGENO
;;; CL-RELATION END

VWT =  (WT/75)**THETA(3)
VCOV = VWT

TVFREL  = THETA(1)*FRELCOV
TVCL    = THETA(4)*CLCOV
TVV     = THETA(5)*VCOV
TVMAT   = THETA(6)
TVD1    = THETA(7)
TVRUV   = THETA(8)

MU_1  = LOG(TVRUV)
MU_2  = TVD1
MU_3  = LOG(TVFREL)
MU_4  = LOG(TVCL)
MU_5  = LOG(TVV)
MU_6  = LOG(TVMAT)

RUV   = EXP(MU_1               + ETA(1))
D1FR  = MU_2                   + ETA(2)
FREL  = FRELCOVTIME * EXP(MU_3 + ETA(3))
CL    = CLCOVTIME   * EXP(MU_4 + ETA(4))
V     = EXP(MU_5               + ETA(5))
MAT   = EXP(MU_6               + ETA(6))

D1    = MAT*(1-D1FR)
F1    = FREL
KA    = 1 / (MAT-D1)
S2    = V

     MU_7 = THETA(17)
     COV7 = MU_7 + ETA(7)
     MU_8 = THETA(18)
     COV8 = MU_8 + ETA(8)
     MU_9 = THETA(19)
     COV9 = MU_9 + ETA(9)
     MU_10 = THETA(20)
     COV10 = MU_10 + ETA(10)
     MU_11 = THETA(21)
     COV11 = MU_11 + ETA(11)
     MU_12 = THETA(22)
     COV12 = MU_12 + ETA(12)
$ERROR
CP    = A(2)*1000 / V
IPRED = LOG(CP + 0.00001)
Y     = IPRED + EPS(1) * EXP(ETA(1))

;;;FREM CODE BEGIN COMPACT
;;;DO NOT MODIFY
     IF (FREMTYPE.EQ.100) THEN
;       AGE  1
        Y = COV7 + EPS(2)
        IPRED = COV7
     END IF
     IF (FREMTYPE.EQ.200) THEN
;       BMI  1
        Y = COV8 + EPS(2)
        IPRED = COV8
     END IF
     IF (FREMTYPE.EQ.300) THEN
;       CRCL  1
        Y = COV9 + EPS(2)
        IPRED = COV9
     END IF
     IF (FREMTYPE.EQ.400) THEN
;       SEX  1
        Y = COV10 + EPS(2)
        IPRED = COV10
     END IF
     IF (FREMTYPE.EQ.500) THEN
;       RACEL_3  1
        Y = COV11 + EPS(2)
        IPRED = COV11
     END IF
     IF (FREMTYPE.EQ.600) THEN
;       RACEL_2  1
        Y = COV12 + EPS(2)
        IPRED = COV12
     END IF
;;;FREM CODE END COMPACT
$THETA  1 FIX ; 1. TVFREL
$THETA  0.75 FIX ; 2. WT coef on TVCL
$THETA  1 FIX ; 3. WT coef on TVV
$THETA  (0,12.9238) ; 4. TVCL
$THETA  (0,206.447) ; 5. TVV
$THETA  (0,6.6169) ; 6. TVMAT
$THETA  (0,0.63728,1) ; 7 TVD1
$THETA  1 FIX ; TVRUV
$THETA  (-1,0.733499) ; GENO=1 on CL
$THETA  (-1,-0.257239) ; GENO=3 on CL
$THETA  (-1,-0.519219) ; GENO=4 on CL
$THETA  (-1.00,0.24303,3.00) ; CLFOOD1
$THETA  (-1.00,-0.143368,3.00) ; FRELFORM1
$THETA  (-1.00,0.322536,3.00) ; FRELGENO1
 (-1.00,2.77068,3.00) ; FRELGENO2
 (-1.00,-0.408129,3.00) ; FRELGENO3
$THETA  44.2148 ; TV_AGE
 30.3011 ; TV_BMI
 118.823 ; TV_CRCL
 1.4465 ; TV_SEX
 0.0193571 ; TV_RACEL_3
 0.200529 ; TV_RACEL_2
$OMEGA  0.0821397  ; 1. IIV on RUV
$OMEGA  0.0001  FIX  ;         D1
$OMEGA  BLOCK(10)
 0.355118  ; 2. IIV on FREL
 0.107884 0.162604  ; 3. IIV on CL
 0.0632937 0.0540479 0.146033  ; 4. IIV on V
 -0.000997759 0.0275816 0.0511788 0.151893  ; 5. IIV on MAT
 1.35309 0.940607 1.13431 -0.116914 171.152  ;    BSV_AGE
 1.80361 1.53831 1.83275 0.180495 21.5876 39.8735  ;    BSV_BMI
 5.53285 4.99748 5.83668 1.00508 -119.198 79.9421 592.248  ;   BSV_CRCL
 -0.058362 -0.0226342 -0.0124707 -0.00391241 -0.248546 -0.12715 -0.107272 0.247506  ;    BSV_SEX
 -0.00114649 0.00132732 -0.0046923 0.00394207 0.0319504 -0.0576348 -0.295547 -0.00173723 0.019015  ; BSV_RACEL_3
 -0.00593722 -0.00209445 0.00427665 -0.00334753 -1.12644 -0.0188588 0.276756 0.00169173 -0.0038889 0.160554  ; BSV_RACEL_2
$SIGMA  0.0429072  ;     1. RUV
$SIGMA  1E-07  FIX  ;     EPSCOV
$ESTIMATION METHOD=IMPMAP AUTO=1 RANMETHOD=3P INTER NOABORT PRINT=1
            CITER=15 NOCOV=1 ISAMPEND=100 NITER=100 ISAMPLE=300
            CTYPE=1 CALPHA=0.001
$ESTIMATION METHOD=IMPMAP INTER EONLY=1 NITER=5 ISAMPLE=1000 NOCOV=0
$COVARIANCE PRINT=E UNCONDITIONAL

NM-TRAN MESSAGES
 WARNINGS AND ERRORS (IF ANY) FOR PROBLEM    1
 (WARNING  2) NM-TRAN INFERS THAT THE DATA ARE POPULATION.
 (MU_WARNING 26) DATA ITEM(S) USED IN DEFINITION OF MU_(S) SHOULD BE CONSTANT FOR INDIV. REC.:
  WT
Note: The following floating-point exceptions are signalling: IEEE_INVALID_FLAG IEEE_DIVIDE_BY_ZERO

1NONLINEAR MIXED EFFECTS MODEL PROGRAM (NONMEM) VERSION 7.3.0
 ORIGINALLY DEVELOPED BY STUART BEAL, LEWIS SHEINER, AND ALISON BOECKMANN
 CURRENT DEVELOPERS ARE ROBERT BAUER, ICON DEVELOPMENT SOLUTIONS,
 AND ALISON BOECKMANN. IMPLEMENTATION, EFFICIENCY, AND STANDARDIZATION
 PERFORMED BY NOUS INFOSYSTEMS.
 PROBLEM NO.:         1
 run 1
 TOT. NO. OF OBS RECS:    10623
 TOT. NO. OF INDIVIDUALS:    755
 ONE COMPARTMENT MODEL WITH FIRST-ORDER ABSORPTION (ADVAN2)
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 #TBLN:      1
 #METH: Importance Sampling assisted by MAP Estimation (No Prior)
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
 #TERM:
 OPTIMIZATION WAS NOT COMPLETED

 ETABAR IS THE ARITHMETIC MEAN OF THE ETA-ESTIMATES,
 AND THE P-VALUE IS GIVEN FOR THE NULL HYPOTHESIS THAT THE TRUE MEAN IS 0.

 ETABAR:        -1.3161E-03 -3.1603E-05 -2.4247E-03 -5.4815E-04 -2.3806E-04  1.5059E-03 -8.5661E-03 -1.1598E-02 -3.5389E-02  3.5438E-04
                 9.6405E-06  4.4084E-05
 SE:             6.8979E-03  4.2683E-05  2.0025E-02  1.3477E-02  1.3638E-02  1.1507E-02  4.8621E-01  2.3468E-01  9.0444E-01  1.8489E-02
                 5.1248E-03  1.4892E-02
 N:                     723         723         723         723         723         723         723         723         723         723
                        723         723

 P VAL.:         8.4868E-01  4.5905E-01  9.0362E-01  9.6756E-01  9.8607E-01  8.9588E-01  9.8594E-01  9.6058E-01  9.6879E-01  9.8471E-01
                 9.9850E-01  9.9764E-01

 ETAshrink(%):   3.5130E+01  8.8515E+01  9.2738E+00  9.7219E+00  4.9042E+00  1.9690E+01  3.2118E-05  1.7005E-04  1.1634E-04  1.2029E-04
                 1.9186E-03  1.0000E-10
 EBVshrink(%):   3.5183E+01  9.2683E+01  9.1509E+00  1.0550E+01  4.6900E+00  2.0252E+01  2.8826E-08  1.2407E-07  8.3078E-09  2.0015E-05
                 2.6126E-04  3.0839E-05
 EPSshrink(%):   1.4753E+01  9.0232E+01

 #TERE:
 Elapsed estimation time in seconds:  6976.45

 ********************            IMPORTANCE SAMPLING ASSISTED BY MAP ESTIMATION (NO PRIOR)           ********************
 #OBJT:**************                        FINAL VALUE OF OBJECTIVE FUNCTION                       ********************
 #OBJV:********************************************     1888.891       **************************************************

 ********************            IMPORTANCE SAMPLING ASSISTED BY MAP ESTIMATION (NO PRIOR)           ********************
 ********************                             FINAL PARAMETER ESTIMATE                           ********************

 THETA - VECTOR OF FIXED EFFECTS PARAMETERS   *********
         TH 1      TH 2      TH 3      TH 4      TH 5      TH 6      TH 7      TH 8      TH 9      TH10      TH11      TH12
          TH13      TH14      TH15      TH16      TH17      TH18      TH19      TH20      TH21      TH22
         1.00E+00  7.50E-01  1.00E+00  1.29E+01  2.07E+02  6.58E+00  6.34E-01  1.00E+00  7.41E-01 -2.58E-01 -5.31E-01  2.43E-01
         -1.44E-01  3.11E-01  2.65E+00 -4.02E-01  4.42E+01  3.03E+01  1.19E+02  1.45E+00  1.94E-02  2.01E-01

 OMEGA - COV MATRIX FOR RANDOM EFFECTS - ETAS  ********
            ETA1      ETA2      ETA3      ETA4      ETA5      ETA6      ETA7      ETA8      ETA9      ET10      ET11      ET12
 ETA1
+        8.19E-02
 ETA2
+        0.00E+00  1.00E-04
 ETA3
+        0.00E+00  0.00E+00  3.53E-01
 ETA4
+        0.00E+00  0.00E+00  1.07E-01  1.61E-01
 ETA5
+        0.00E+00  0.00E+00  6.44E-02  5.63E-02  1.49E-01
 ETA6
+        0.00E+00  0.00E+00 -8.83E-04  2.71E-02  5.16E-02  1.49E-01
 ETA7
+        0.00E+00  0.00E+00  1.37E+00  9.45E-01  1.15E+00 -1.51E-01  1.71E+02
 ETA8
+        0.00E+00  0.00E+00  1.83E+00  1.55E+00  1.84E+00  2.01E-01  2.16E+01  3.99E+01
 ETA9
+        0.00E+00  0.00E+00  5.56E+00  5.02E+00  5.86E+00  1.13E+00 -1.19E+02  7.99E+01  5.92E+02
 ET10
+        0.00E+00  0.00E+00 -5.70E-02 -2.21E-02 -1.53E-02 -1.60E-03 -2.49E-01 -1.27E-01 -1.07E-01  2.48E-01
 ET11
+        0.00E+00  0.00E+00 -1.43E-03  1.26E-03 -4.07E-03  3.71E-03  3.20E-02 -5.76E-02 -2.96E-01 -1.74E-03  1.90E-02
 ET12
+        0.00E+00  0.00E+00 -5.55E-03 -2.33E-03  3.21E-03 -3.75E-03 -1.13E+00 -1.89E-02  2.77E-01  1.69E-03 -3.89E-03  1.61E-01

 SIGMA - COV MATRIX FOR RANDOM EFFECTS - EPSILONS  ****
            EPS1      EPS2
 EPS1
+        4.29E-02
            EPS1      EPS2
 EPS2
+        0.00E+00  1.00E-07

 OMEGA - CORR MATRIX FOR RANDOM EFFECTS - ETAS  *******
            ETA1      ETA2      ETA3      ETA4      ETA5      ETA6      ETA7      ETA8      ETA9      ET10      ET11      ET12
 ETA1
+        2.86E-01
 ETA2
+        0.00E+00  1.00E-02
 ETA3
+        0.00E+00  0.00E+00  5.94E-01
 ETA4
+        0.00E+00  0.00E+00  4.48E-01  4.02E-01
 ETA5
+        0.00E+00  0.00E+00  2.81E-01  3.63E-01  3.86E-01
 ETA6
+        0.00E+00  0.00E+00 -3.85E-03  1.75E-01  3.47E-01  3.86E-01
 ETA7
+        0.00E+00  0.00E+00  1.76E-01  1.80E-01  2.27E-01 -3.00E-02  1.31E+01
 ETA8
+        0.00E+00  0.00E+00  4.87E-01  6.11E-01  7.57E-01  8.27E-02  2.61E-01  6.31E+00
 ETA9
+        0.00E+00  0.00E+00  3.85E-01  5.14E-01  6.24E-01  1.21E-01 -3.74E-01  5.20E-01  2.43E+01
 ET10
+        0.00E+00  0.00E+00 -1.93E-01 -1.11E-01 -7.97E-02 -8.35E-03 -3.82E-02 -4.05E-02 -8.86E-03  4.98E-01
 ET11
+        0.00E+00  0.00E+00 -1.75E-02  2.28E-02 -7.65E-02  6.98E-02  1.77E-02 -6.62E-02 -8.81E-02 -2.53E-02  1.38E-01
 ET12
+        0.00E+00  0.00E+00 -2.33E-02 -1.44E-02  2.07E-02 -2.43E-02 -2.15E-01 -7.45E-03  2.84E-02  8.49E-03 -7.04E-02  4.01E-01

 SIGMA - CORR MATRIX FOR RANDOM EFFECTS - EPSILONS  ***
            EPS1      EPS2
 EPS1
+        2.07E-01
 EPS2
+        0.00E+00  3.16E-04
 #TBLN:      2
 #METH: Objective Function Evaluation by Importance/MAP Sampling (No Prior)
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
 #TERM:
 EXPECTATION ONLY PROCESS COMPLETED

 ETABAR IS THE ARITHMETIC MEAN OF THE ETA-ESTIMATES,
 AND THE P-VALUE IS GIVEN FOR THE NULL HYPOTHESIS THAT THE TRUE MEAN IS 0.

 ETABAR:        -1.5820E-03 -5.6031E-05 -3.9480E-03 -1.6110E-03 -5.5800E-05 -3.2060E-04 -8.5653E-03 -1.1597E-02 -3.5389E-02  3.5495E-04
                 8.8754E-06  4.3959E-05
 SE:             6.8791E-03  3.2527E-05  2.0038E-02  1.3409E-02  1.3612E-02  1.1425E-02  4.8621E-01  2.3468E-01  9.0444E-01  1.8489E-02
                 5.1248E-03  1.4892E-02
 N:                     723         723         723         723         723         723         723         723         723         723
                        723         723

 P VAL.:         8.1811E-01  8.4962E-02  8.4380E-01  9.0437E-01  9.9673E-01  9.7761E-01  9.8594E-01  9.6059E-01  9.6879E-01  9.8468E-01
                 9.9862E-01  9.9764E-01

 ETAshrink(%):   3.5307E+01  9.1248E+01  9.2185E+00  1.0178E+01  5.0875E+00  2.0260E+01  3.4725E-05  1.6539E-04  1.2025E-04  1.0000E-10
                 7.8079E-04  1.2377E-04
 EBVshrink(%):   3.5491E+01  9.3385E+01  9.2746E+00  1.0609E+01  4.6842E+00  2.0172E+01  2.9183E-08  1.2529E-07  8.4113E-09  2.0042E-05
                 2.6302E-04  3.0970E-05
 EPSshrink(%):   1.5019E+01  9.4154E+01

 #TERE:
 Elapsed estimation time in seconds:   349.48

 Number of Negative Eigenvalues in Matrix=           5
 Most negative value=  -26657.952335882997
 Most positive value=   1017911.4366748524
 Forcing positive definiteness
 Root mean square deviation of matrix from original=    4.7055595012093478E-002

 Elapsed covariance time in seconds:  1597.37

 ********************       OBJECTIVE FUNCTION EVALUATION BY IMPORTANCE/MAP SAMPLING (NO PRIOR)      ********************
 #OBJT:**************                        FINAL VALUE OF OBJECTIVE FUNCTION                       ********************
 #OBJV:********************************************     1891.552       **************************************************

 ********************       OBJECTIVE FUNCTION EVALUATION BY IMPORTANCE/MAP SAMPLING (NO PRIOR)      ********************
 ********************                             FINAL PARAMETER ESTIMATE                           ********************

 THETA - VECTOR OF FIXED EFFECTS PARAMETERS   *********
         TH 1      TH 2      TH 3      TH 4      TH 5      TH 6      TH 7      TH 8      TH 9      TH10      TH11      TH12
          TH13      TH14      TH15      TH16      TH17      TH18      TH19      TH20      TH21      TH22
         1.00E+00  7.50E-01  1.00E+00  1.29E+01  2.07E+02  6.58E+00  6.34E-01  1.00E+00  7.41E-01 -2.58E-01 -5.31E-01  2.43E-01
         -1.44E-01  3.11E-01  2.65E+00 -4.02E-01  4.42E+01  3.03E+01  1.19E+02  1.45E+00  1.94E-02  2.01E-01

 OMEGA - COV MATRIX FOR RANDOM EFFECTS - ETAS  ********
            ETA1      ETA2      ETA3      ETA4      ETA5      ETA6      ETA7      ETA8      ETA9      ET10      ET11      ET12
 ETA1
+        8.19E-02
 ETA2
+        0.00E+00  1.00E-04
 ETA3
+        0.00E+00  0.00E+00  3.53E-01
 ETA4
+        0.00E+00  0.00E+00  1.07E-01  1.61E-01
 ETA5
+        0.00E+00  0.00E+00  6.44E-02  5.63E-02  1.49E-01
 ETA6
+        0.00E+00  0.00E+00 -8.83E-04  2.71E-02  5.16E-02  1.49E-01
 ETA7
+        0.00E+00  0.00E+00  1.37E+00  9.45E-01  1.15E+00 -1.51E-01  1.71E+02
 ETA8
+        0.00E+00  0.00E+00  1.83E+00  1.55E+00  1.84E+00  2.01E-01  2.16E+01  3.99E+01
 ETA9
+        0.00E+00  0.00E+00  5.56E+00  5.02E+00  5.86E+00  1.13E+00 -1.19E+02  7.99E+01  5.92E+02
 ET10
+        0.00E+00  0.00E+00 -5.70E-02 -2.21E-02 -1.53E-02 -1.60E-03 -2.49E-01 -1.27E-01 -1.07E-01  2.48E-01
 ET11
+        0.00E+00  0.00E+00 -1.43E-03  1.26E-03 -4.07E-03  3.71E-03  3.20E-02 -5.76E-02 -2.96E-01 -1.74E-03  1.90E-02
 ET12
+        0.00E+00  0.00E+00 -5.55E-03 -2.33E-03  3.21E-03 -3.75E-03 -1.13E+00 -1.89E-02  2.77E-01  1.69E-03 -3.89E-03  1.61E-01

 SIGMA - COV MATRIX FOR RANDOM EFFECTS - EPSILONS  ****
            EPS1      EPS2
 EPS1
+        4.29E-02
            EPS1      EPS2
 EPS2
+        0.00E+00  1.00E-07

 OMEGA - CORR MATRIX FOR RANDOM EFFECTS - ETAS  *******
            ETA1      ETA2      ETA3      ETA4      ETA5      ETA6      ETA7      ETA8      ETA9      ET10      ET11      ET12
 ETA1
+        2.86E-01
 ETA2
+        0.00E+00  1.00E-02
 ETA3
+        0.00E+00  0.00E+00  5.94E-01
 ETA4
+        0.00E+00  0.00E+00  4.48E-01  4.02E-01
 ETA5
+        0.00E+00  0.00E+00  2.81E-01  3.63E-01  3.86E-01
 ETA6
+        0.00E+00  0.00E+00 -3.85E-03  1.75E-01  3.47E-01  3.86E-01
 ETA7
+        0.00E+00  0.00E+00  1.76E-01  1.80E-01  2.27E-01 -3.00E-02  1.31E+01
 ETA8
+        0.00E+00  0.00E+00  4.87E-01  6.11E-01  7.57E-01  8.27E-02  2.61E-01  6.31E+00
 ETA9
+        0.00E+00  0.00E+00  3.85E-01  5.14E-01  6.24E-01  1.21E-01 -3.74E-01  5.20E-01  2.43E+01
 ET10
+        0.00E+00  0.00E+00 -1.93E-01 -1.11E-01 -7.97E-02 -8.35E-03 -3.82E-02 -4.05E-02 -8.86E-03  4.98E-01
 ET11
+        0.00E+00  0.00E+00 -1.75E-02  2.28E-02 -7.65E-02  6.98E-02  1.77E-02 -6.62E-02 -8.81E-02 -2.53E-02  1.38E-01
 ET12
+        0.00E+00  0.00E+00 -2.33E-02 -1.44E-02  2.07E-02 -2.43E-02 -2.15E-01 -7.45E-03  2.84E-02  8.49E-03 -7.04E-02  4.01E-01

 SIGMA - CORR MATRIX FOR RANDOM EFFECTS - EPSILONS  ***
            EPS1      EPS2
 EPS1
+        2.07E-01
 EPS2
+        0.00E+00  3.16E-04

 ********************       OBJECTIVE FUNCTION EVALUATION BY IMPORTANCE/MAP SAMPLING (NO PRIOR)      ********************
 ********************                         STANDARD ERROR OF ESTIMATE (RSR)                       ********************

 THETA - VECTOR OF FIXED EFFECTS PARAMETERS   *********
         TH 1      TH 2      TH 3      TH 4      TH 5      TH 6      TH 7      TH 8      TH 9      TH10      TH11      TH12
          TH13      TH14      TH15      TH16      TH17      TH18      TH19      TH20      TH21      TH22
         0.00E+00  0.00E+00  0.00E+00  3.09E-01  8.40E+00  1.68E-01  1.54E-02  0.00E+00  1.35E+00  1.09E-01  1.08E-01  3.39E-02
          1.64E-02  1.97E-01  7.52E-01  5.83E-01  6.29E-01  3.81E-01  1.15E+00  1.92E-02  3.53E-03  1.55E-02

 OMEGA - COV MATRIX FOR RANDOM EFFECTS - ETAS  ********
            ETA1      ETA2      ETA3      ETA4      ETA5      ETA6      ETA7      ETA8      ETA9      ET10      ET11      ET12
 ETA1
+        1.13E-02
 ETA2
+        0.00E+00  0.00E+00
 ETA3
+        0.00E+00  0.00E+00  1.38E-01
 ETA4
+        0.00E+00  0.00E+00  1.16E-01  1.02E-01
 ETA5
+        0.00E+00  0.00E+00  9.00E-02  6.28E-02  1.02E-01
 ETA6
+        0.00E+00  0.00E+00  4.64E-02  3.77E-02  4.89E-02  1.71E-02
 ETA7
+        0.00E+00  0.00E+00  6.60E-01  4.59E-01  4.03E-01  3.41E-01  7.46E+00
 ETA8
+        0.00E+00  0.00E+00  1.62E+00  1.56E+00  1.47E+00  1.83E-01  2.88E+00  2.53E+00
 ETA9
+        0.00E+00  0.00E+00  8.27E-01  8.68E-01  9.03E-01  4.94E-01  1.22E+01  5.80E+00  2.33E+01
 ET10
+        0.00E+00  0.00E+00  8.99E-02  8.75E-02  9.56E-02  1.26E-02  2.65E-01  1.40E-01  4.97E-01  2.05E-03
 ET11
+        0.00E+00  0.00E+00  3.44E-02  3.40E-02  4.02E-02  9.45E-03  6.41E-02  4.05E-02  1.69E-01  2.94E-03  9.01E-03
 ET12
+        0.00E+00  0.00E+00  5.80E-02  5.67E-02  6.04E-02  9.64E-03  1.92E-01  9.16E-02  3.57E-01  7.49E-03  1.71E-03  8.93E-03

 SIGMA - COV MATRIX FOR RANDOM EFFECTS - EPSILONS  ****
            EPS1      EPS2
 EPS1
+        2.30E-03
            EPS1      EPS2
 EPS2
+        0.00E+00  0.00E+00

 OMEGA - CORR MATRIX FOR RANDOM EFFECTS - ETAS  *******
            ETA1      ETA2      ETA3      ETA4      ETA5      ETA6      ETA7      ETA8      ETA9      ET10      ET11      ET12
 ETA1
+        1.97E-02
 ETA2
+       ......... .........
 ETA3
+       ......... .........  1.16E-01
 ETA4
+       ......... .........  2.66E-01  1.27E-01
 ETA5
+       ......... .........  2.93E-01  2.66E-01  1.32E-01
 ETA6
+       ......... .........  2.02E-01  2.34E-01  4.47E-01  2.22E-02
 ETA7
+       ......... .........  6.58E-02  7.84E-02  7.33E-02  6.73E-02  2.85E-01
 ETA8
+       ......... .........  3.63E-01  5.33E-01  4.89E-01  7.54E-02  3.23E-02  2.01E-01
 ETA9
+       ......... .........  6.94E-02  1.49E-01  1.83E-01  5.24E-02  3.21E-02  2.38E-02  4.79E-01
 ET10
+       ......... .........  2.88E-01  4.33E-01  4.74E-01  6.59E-02  4.07E-02  4.44E-02  4.10E-02  2.06E-03
 ET11
+       ......... .........  4.19E-01  6.16E-01  7.59E-01  1.62E-01  3.68E-02  4.32E-02  4.70E-02  3.99E-02  3.27E-02
 ET12
+       ......... .........  2.44E-01  3.51E-01  3.85E-01  6.26E-02  3.46E-02  3.62E-02  3.65E-02  3.76E-02  1.43E-02  1.11E-02

 SIGMA - CORR MATRIX FOR RANDOM EFFECTS - EPSILONS  ***
            EPS1      EPS2
 EPS1
+        5.56E-03
 EPS2
+       ......... .........
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
 ********************       OBJECTIVE FUNCTION EVALUATION BY IMPORTANCE/MAP SAMPLING (NO PRIOR)      ********************
 ********************                   EIGENVALUES OF COR MATRIX OF ESTIMATE (RSR)                  ********************

             1         2         3         4         5         6         7         8         9        10        11        12
             13        14        15        16        17        18        19        20        21        22        23        24
            25        26        27        28        29        30        31        32        33        34        35        36
             37        38        39        40        41        42        43        44        45        46        47        48
            49        50        51        52        53        54        55        56        57        58        59        60
             61        62        63        64        65        66        67        68        69        70        71        72
            73        74        75
         3.20E-09  3.93E-09  1.85E-08  1.27E-04  1.70E-04  5.20E-04  7.67E-04  1.59E-03  1.85E-03  2.26E-03  2.76E-03  4.14E-03
          4.93E-03  5.06E-03  6.25E-03  7.79E-03  9.80E-03  1.08E-02  1.17E-02  1.59E-02  1.79E-02  1.98E-02  2.61E-02  3.48E-02
         3.95E-02  4.35E-02  4.77E-02  4.98E-02  6.64E-02  6.82E-02  7.83E-02  7.89E-02  8.64E-02  9.70E-02  1.21E-01  1.45E-01
          1.51E-01  1.88E-01  2.06E-01  2.16E-01  2.27E-01  2.56E-01  2.79E-01  3.16E-01  3.39E-01  3.73E-01  3.92E-01  4.48E-01
         4.56E-01  4.84E-01  5.86E-01  6.17E-01  6.62E-01  6.78E-01  7.29E-01  7.59E-01  7.93E-01  8.47E-01  9.07E-01  1.02E+00
          1.06E+00  1.12E+00  1.23E+00  1.31E+00  1.44E+00  1.48E+00  1.64E+00  1.78E+00  2.01E+00  2.20E+00  2.23E+00  2.41E+00
         3.78E+00  8.29E+00  3.00E+01
