Fri Nov  6 12:21:04 CET 2020
$PROBLEM    Time-to-event model example Weibull distribution
$INPUT      ID TIME DV EVID DOSE EXPO AGE
$DATA      tte_data1.dat IGNORE=@
$SUBROUTINE ADVAN=13 TOL=9
$MODEL      COMP=(HAZARD)
$PK

   LAM= THETA(1)*EXP(ETA(1))
   SHP=THETA(2)

;--------------Covariate relationships---------------
;--------------SCM compatible code-------------------
   TVRF =  (AGE-50)*THETA(3)
   TVEFF = THETA(4)*EXPO
   RFCOV = 0

   TVRF = RFCOV+TVRF
   RF   = 1*TVRF+TVEFF

$DES

   DEL= 1E-12

;----------hazard-----------------------------------

   DADT(1)=LAM*EXP(RF)*SHP*(LAM*T+DEL)**(SHP-1)

;----------TTE Model------------------------------

$ERROR

  CHZ = A(1)
  SURX = EXP(-CHZ)            ;survival probability

  DELX = 1E-12

  HAZNOW = LAM*SHP*EXP(RF)*(LAM*TIME+DELX)**(SHP-1)

  Y=SURX                      ;censored event (prob of survival)
  IF(DV.EQ.1)  Y=SURX*HAZNOW  ;prob density function of event

$THETA  (0,5E-03) ; LAMBDA; 1
$THETA  (0.2,1.3) ; SHAPE; 2  1FIX for exponential distr
$THETA  (0,0.5,2) ; AGE EFFECT
$THETA  (-1,-0.01,1) ; EXPOSURE EFFECT
$OMEGA  0  FIX
$ESTIMATION MAXEVAL=9999 METHOD=0 LIKE SIGL=9 NSIG=3 PRINT=1
$COVARIANCE MATRIX=R UNCONDITIONAL PRINT=E
$TABLE      ID TIME SURX CHZ EVID AGE EXPO DOSE NOPRINT ONEHEADER
            FILE=tte_weibull_sdtab

NM-TRAN MESSAGES
 WARNINGS AND ERRORS (IF ANY) FOR PROBLEM    1
 (WARNING  2) NM-TRAN INFERS THAT THE DATA ARE POPULATION.
 (WARNING  97) A RANDOM QUANTITY IS RAISED TO A POWER. IF THE RESULT AFFECTS
 THE VALUE OF THE OBJECTIVE FUNCTION, THE USER SHOULD ENSURE THAT THE
 RANDOM QUANTITY IS NEVER 0 WHEN THE POWER IS < 1.

1NONLINEAR MIXED EFFECTS MODEL PROGRAM (NONMEM) VERSION 7.4.4
 ORIGINALLY DEVELOPED BY STUART BEAL, LEWIS SHEINER, AND ALISON BOECKMANN
 CURRENT DEVELOPERS ARE ROBERT BAUER, ICON DEVELOPMENT SOLUTIONS,
 AND ALISON BOECKMANN. IMPLEMENTATION, EFFICIENCY, AND STANDARDIZATION
 PERFORMED BY NOUS INFOSYSTEMS.
 PROBLEM NO.:         1
 Time-to-event model example Weibull distribution
 TOT. NO. OF OBS RECS:      300
 TOT. NO. OF INDIVIDUALS:      300
 GENERAL NONLINEAR KINETICS MODEL WITH STIFF/NONSTIFF EQUATIONS (LSODA, ADVAN13)
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 #TBLN:      1
 #METH: First Order
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
 #TERM:
0MINIMIZATION SUCCESSFUL
 NO. OF FUNCTION EVALUATIONS USED:      196
 NO. OF SIG. DIGITS IN FINAL EST.:  3.2

 TOTAL DATA POINTS NORMALLY DISTRIBUTED (N):            0
 N*LOG(2PI) CONSTANT TO OBJECTIVE FUNCTION:    0.0000000000000000
 OBJECTIVE FUNCTION VALUE WITHOUT CONSTANT:    2982.3048062836820
 OBJECTIVE FUNCTION VALUE WITH CONSTANT:       2982.3048062836820
 REPORTED OBJECTIVE FUNCTION DOES NOT CONTAIN CONSTANT

 TOTAL EFFECTIVE ETAS (NIND*NETA):                             0


 #TERE:
 Elapsed estimation  time in seconds:    14.27
 Elapsed covariance  time in seconds:     1.76
 Elapsed postprocess time in seconds:     0.16

 ********************                                   FIRST ORDER                                  ********************
 #OBJT:**************                       MINIMUM VALUE OF OBJECTIVE FUNCTION                      ********************
 #OBJV:********************************************     2982.305       **************************************************

 ********************                                   FIRST ORDER                                  ********************
 ********************                             FINAL PARAMETER ESTIMATE                           ********************

 THETA - VECTOR OF FIXED EFFECTS PARAMETERS   *********
         TH 1      TH 2      TH 3      TH 4
         1.09E-02  1.32E+00  1.35E-02 -1.05E-02

 OMEGA - COV MATRIX FOR RANDOM EFFECTS - ETAS  ********
         ETA1
 ETA1
+        0.00E+00

 OMEGA - CORR MATRIX FOR RANDOM EFFECTS - ETAS  *******
         ETA1
 ETA1
+        0.00E+00

 ********************                                   FIRST ORDER                                  ********************
 ********************                            STANDARD ERROR OF ESTIMATE                          ********************

 THETA - VECTOR OF FIXED EFFECTS PARAMETERS   *********
         TH 1      TH 2      TH 3      TH 4
         6.56E-04  6.69E-02  9.18E-03  6.36E-04

 OMEGA - COV MATRIX FOR RANDOM EFFECTS - ETAS  ********
         ETA1
 ETA1
+       .........

 OMEGA - CORR MATRIX FOR RANDOM EFFECTS - ETAS  *******
         ETA1
 ETA1
+       .........

 ********************                                   FIRST ORDER                                  ********************
 ********************                          COVARIANCE MATRIX OF ESTIMATE                         ********************

            TH 1      TH 2      TH 3      TH 4      OM11
 TH 1
+        4.30E-07
 TH 2
+       -1.41E-05  4.48E-03
 TH 3
+       -1.20E-07  3.87E-05  8.43E-05
 TH 4
+       -8.99E-08 -2.51E-05 -5.57E-07  4.04E-07
 OM11
+       ......... ......... ......... ......... .........

 ********************                                   FIRST ORDER                                  ********************
 ********************                          CORRELATION MATRIX OF ESTIMATE                        ********************

            TH 1      TH 2      TH 3      TH 4      OM11
 TH 1
+        6.56E-04
 TH 2
+       -3.22E-01  6.69E-02
 TH 3
+       -1.99E-02  6.30E-02  9.18E-03
 TH 4
+       -2.16E-01 -5.89E-01 -9.55E-02  6.36E-04
 OM11
+       ......... ......... ......... ......... .........
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
 ********************                                   FIRST ORDER                                  ********************
 ********************                      EIGENVALUES OF COR MATRIX OF ESTIMATE                     ********************

             1         2         3         4
         2.23E-01  9.80E-01  1.18E+00  1.62E+00
 Elapsed finaloutput time in seconds:     0.02
 #CPUT: Total CPU Time in Seconds,       16.257
